OpenVSP model (file version 4), 5 components.
Geometry view with OpenVSP parameter names; values to 6 digits, angles in degrees, lengths in the model's unit.
Overall bounding box: X_Min=0 X_Len=12.0809 Y_Min=-6.6857 Y_Len=13.3714 Z_Min=-0.670168 Z_Len=3.42227

Fuselage "Fuselage"
  location (X Y Z) 0 0 0, rotation 0 0 0
  bounding box size 11.09 1.6 1.61785
  Design: Length=11.09
  cross sections:
    n  XLocPercent  YLocPercent  ZLocPercent  shape
    0  0            0            0            point
    1  0.25         0            0            rounded rectangle RoundRectXSec_Radius=0.5 RoundedRect_Height=1.12273 RoundedRect_Width=1.6
    2  0.337459     0            0.0217391    rounded rectangle RoundRectXSec_Radius=0.5 RoundedRect_Height=1.61785 RoundedRect_Width=1.6
    3  0.593113     0            0.0217391    as above
    4  0.871742     0            0.0217391    rounded rectangle RoundRectXSec_Radius=0.35 RoundedRect_Height=0.7 RoundedRect_Width=0.7
    5  1            0            0.0217391    point

Wing "Tailplane", child of "Fuselage"
  location (X Y Z) 9 0 0, rotation 0 0 0
  symmetric about XZ
  bounding box size 1.54331 5.18 0.231639
  totals: TotalSpan=5.18 TotalProjectedSpan=5.18 TotalChord=1.23465 TotalArea=6.39546
  root: chord 1.54331, twist 0, NACA 4-series Camber=0 CamberLoc=0.2 ThickChord=0.15
  sections:
    n  Span  Root_Chord  Tip_Chord  Area     Sweep  Sweep_Location  Dihedral  Twist  Twist_Location  tip airfoil
    1  2.59  1.54331     0.925984   3.19773  0      0.25            0         0      0.25            as above

Wing "Fin", child of "Fuselage"
  location (X Y Z) 8.1 0 0.252101, rotation 90 0 0
  bounding box size 3.98092 0.450201 2.5
  totals: TotalSpan=2.5 TotalProjectedSpan=2.5 TotalChord=2.15 TotalArea=5.375
  root: chord 3, twist 0, NACA 4-series Camber=0 CamberLoc=0.2 ThickChord=0.15
  sections:
    n  Span  Root_Chord  Tip_Chord  Area   Sweep  Sweep_Location  Dihedral  Twist  Twist_Location  tip airfoil
    1  2.5   3           1.3        5.375  47     0               0         0      0.25            as above

Wing "Wing"
  location (X Y Z) 3.9 0 -0.420168, rotation 0 0 0
  symmetric about XZ
  bounding box size 1.8 13.3714 0.772188
  totals: TotalSpan=13.45 TotalProjectedSpan=13.3714 TotalChord=1.6 TotalArea=20.9792
  root: chord 1.8, twist 0, NACA 4-series Camber=0 CamberLoc=0.2 ThickChord=0.15
  sections:
    n  Span     Root_Chord  Tip_Chord  Area     Sweep  Sweep_Location  Dihedral  Twist  Twist_Location  tip airfoil
    1  2.68644  1.8         1.8        4.8356   0      0.25            0         0      0.25            as above
    2  4.03856  1.8         1          5.65398  0      0.25            8         0      0.25            as above

Fuselage "Nacelles", child of "Wing"
  location (X Y Z) 2.4 2.4 -0.420168, rotation 0 0 0; relative location -1.5 2.4 0, rotation 0 0 0
  symmetric about XZ
  bounding box size 3.4582 5.8 0.5
  Design: Length=3.34153
  cross sections:
    n  XLocPercent  YLocPercent  ZLocPercent  shape
    0  0            0            0            point
    1  0.0149457    0            0            rounded rectangle RoundRectXSec_Radius=0.2 RoundedRect_Height=0.5 RoundedRect_Width=1
    2  0.614544     0            0            as above
    3  1            0            0            rounded rectangle RoundRectXSec_Radius=0.05 RoundedRect_Height=0.1 RoundedRect_Width=0.7
    4  1            0            0            point
